// COMSOL Multiphysics 5.6.0.401 model "Heat_Transfer-Example_2.mph"
// Outline of the model tree

Geometry
  geom1 "Geometry 1" (2D, length unit mm)
    r1: Rectangle | size = {50, 100}
    r2: Rectangle | pos = {50, 0}; size = {20, 100}
    pt1: Point | p = {, 50}
    arr1: Array | contributeto = csel1; input = pt1; size = 15; type = linear; linearsize = 15; displ = {5, 0}
    fin: Finalize "Form Union"

Materials
  mat1: Common "Material 1" on domains 1
    def "Basic"
      thermalconductivity = 75
      density = 2000
      heatcapacity = 900
  mat2: Common "Material 2" on domains 2
    def "Basic"
      thermalconductivity = 150
      density = 2000
      heatcapacity = 900

Physics
  ht: HeatTransfer "Heat Transfer in Solids" on all domains
    dependent variable T
    solid1: SolidHeatTransferModel "Solid 1" (default)
    init1: init "Initial Values 1" (default)
    ins1: ThermalInsulation (default)
    solid2: SolidHeatTransferModel "Solid 2" on domains 2
    hs1: HeatSource (disabled) on domains 1 | Q0 = 1.5E6
    hf1: HeatFluxBoundary "Heat Flux 1" on boundaries 9, 10 | HeatFluxType = ConvectiveHeatFlux; h = 1000; Text = 303.15
    temp1: TemperatureBoundary "Temperature 1" on boundaries 1, 3 | T0 = 500[degC]

Mesh
  mesh1 "Mesh 1" (physics-controlled)
    size: MeshSizeDefault | hauto = 4

Studies
  std1 "Study 1"
    stat: Stationary

Solver configurations
  sol1 "Solution 1" (study std1)
    v1: Variables "Dependent Variables 1"
    s1: Stationary "Stationary Solver 1"
      fc1: FullyCoupled | linsolver = d1; initstep = 0.01; minstep = 1.0E-6; maxiter = 50
      d1: Direct "Direct, temperature (ht)" | linsolver = pardiso; pivotperturb = 1.0E-13

Datasets
  dset1: Solution | solution = sol1

Derived values
  av1: AvLine "Line Average 1" on boundaries 1, 3 | data = dset1; table = tbl1; expr = T; unit = degC
  av2: AvLine "Line Average 2" on boundaries 5, 7 | data = dset1; table = tbl2; expr = T; unit = degC
  av3: AvLine "Line Average 3" on boundaries 9, 10 | data = dset1; table = tbl3; expr = T; unit = degC

Tables
  tbl1: Table
    // Line Average 1
    Temperature (degC)
    500
  tbl2: Table
    // Line Average 2
    Temperature (degC)
    325.926
  tbl3: Table
    // Line Average 3
    Temperature (degC)
    291.111

Plots
  pg1: PlotGroup2D "Temperature (ht)" | data = dset1
    surf1: Surface | expr = T
  pg2: PlotGroup2D "Isothermal Contours (ht)" | data = dset1
    con1: Contour | expr = T; levelrounding = off
  pg3: PlotGroup1D "1D Plot Group 3" | data = dset1
    ptgr1: PointGraph on selection geom1_csel1_pnt | data = dset1; expr = T; unit = degC; xdata = expr; xdataexpr = x

Exports
  plot1: Plot | filename = G:\AUTO BACKUP OF CDRIVE\Desktop\Heat_Transfer-Example_1_plot.csv