// COMSOL Multiphysics 5.6.0.401 model "Velocity_fluid_flow_example1.mph"
// Outline of the model tree

Variables
  var1 "Variables 1"
    T = 300[K]  // Tempareture

Geometry
  geom1 "Geometry 1" (2D, length unit m)
    r1: Rectangle | size = {10, 1}
    pt1: Point | p = {5, }
    arr1: Array | contributeto = csel1; input = pt1; size = 11; type = linear; linearsize = 11; displ = {0, 0.1}
    fin: Finalize "Form Union"

Materials
  mat1: Common "Water" on all domains
    def "Basic"
      thermalexpansioncoefficient = alpha_p(T)
      bulkviscosity = muB(T)
      dynamicviscosity = eta(T)
      ratioofspecificheat = gamma_w(T)
      electricconductivity = 5.5e-6[S/m]
      heatcapacity = Cp(T)
      density = rho(T)
      thermalconductivity = k(T)
      soundspeed = cs(T)
      eta: Piecewise
        arg = T
        pieces = 
          {273.15, 413.15, 1.3799566804-0.021224019151*T^1+1.3604562827E-4*T^2-4.6454090319E-7*T^3+8.9042735735E-10*T^4-9.0790692686E-13*T^5+3.8457331488E-16*T^6}
          {413.15, 553.75, 0.00401235783-2.10746715E-5*T^1+3.85772275E-8*T^2-2.39730284E-11*T^3}
        argunit = K
        fununit = Pa*s
      Cp: Piecewise | arg = T; pieces = {273.15, 553.75, 12010.1471-80.4072879*T^1+0.309866854*T^2-5.38186884E-4*T^3+3.62536437E-7*T^4}; argunit = K; fununit = J/(kg*K)
      rho: Piecewise
        arg = T
        smooth = contd1
        pieces = 
          {273.15, 293.15, 6.3092789034e-05*T^3-0.0603676398829*T^2+18.9229382407066*T-950.704055329848}
          {293.15, 373.15, 1.0335053319e-05*T^3-0.0133950656345*T^2+4.96928883266*T+432.257114008512}
        argunit = K
        fununit = kg/m^3
      k: Piecewise | arg = T; pieces = {273.15, 553.75, -0.869083936+0.00894880345*T^1-1.58366345E-5*T^2+7.97543259E-9*T^3}; argunit = K; fununit = W/(m*K)
      cs: Interpolation | table = {{273, 1403}, {278, 1427}, {283, 1447}, {293, 1481}, {303, 1507}, {313, 1526}, {323, 1541}, {333, 1552}, {343, 1555}, {353, 1555}, {363, 1550}, {373, 1543}}; interp = piecewisecubic; argunit = K; fununit = m/s
      an1: Analytic | funcname = alpha_p; expr = -1/rho(T)*d(rho(T),T); args = T; argunit = K; fununit = 1/K
      an2: Analytic | funcname = gamma_w; expr = 1+(T/Cp(T))*(alpha_p(T)*cs(T))^2; args = T; argunit = K; fununit = 1
      an3: Analytic | funcname = muB; expr = 2.79*eta(T); args = T; argunit = K; fununit = Pa*s

Physics
  spf: LaminarFlow on all domains
    dependent variable u = {u, v, w}
    fp1: FluidProperties (default)
    init1: init "Initial Values 1" (default)
    wallbc1: WallBC "Wall 1" (default)
    open1: OpenBoundary on boundaries 3, 5
    inl1: InletBoundary "Inlet 1" on boundaries 1 | BoundaryCondition = FullyDevelopedFlow; Uavfdf = 0.005
    out1: OutletBoundary "Outlet 1" on boundaries 6

Mesh
  mesh1 "Mesh 1" (physics-controlled)
    size: MeshSizeDefault | table = cfd; hauto = 6

Studies
  std1 "Study 1"
    stat: Stationary

Solver configurations
  sol1 "Solution 1" (study std1)
    v1: Variables "Dependent Variables 1"
    s1: Stationary "Stationary Solver 1" | stol = 0.01
      fc1: FullyCoupled | linsolver = d1; initstep = 0.01; maxiter = 1000
      d1: Direct "Direct, fluid flow variables (spf)" | linsolver = pardiso; pivotperturb = 1.0E-13

Datasets
  dset1: Solution | solution = sol1

Derived values
  gpev1: EvalPointMatrix "Point Matrix Evaluation 1" on selection geom1_csel1_pnt
    data = dset1
    table = tbl1
    expr = u
    descr = Velocity field

Tables
  tbl1: Table
    // Point Matrix Evaluation 1
    Velocity field (m/s), Point: 3 | Velocity field (m/s), Point: 4 | Velocity field (m/s), Point: 5 | Velocity field (m/s), Point: 6 | Velocity field (m/s), Point: 7 | Velocity field (m/s), Point: 8 | Velocity field (m/s), Point: 9 | Velocity field (m/s), Point: 10 | Velocity field (m/s), Point: 11 | Velocity field (m/s), Point: 12 | Velocity field (m/s), Point: 13
    0 | 0.0014149 | 0.00267773 | 0.00381873 | 0.00479185 | 0.00560905 | 0.00628052 | 0.00678903 | 0.00713905 | 0.00736843 | 0.00742795
    0 | -1.2411e-07 | 2.22524e-06 | 5.1604e-06 | 4.99045e-06 | 5.88283e-06 | 6.30342e-06 | 6.17153e-06 | 7.15279e-06 | 7.8441e-06 | 8.37375e-06
    0 | 0 | 0 | 0 | 0 | 0 | 0 | 0 | 0 | 0 | 0

Plots
  pg1: PlotGroup2D "Velocity (spf)" | data = dset1
    surf1: Surface | expr = spf.U
    arws1: ArrowSurface | expr = {u, v}
  pg2: PlotGroup2D "Pressure (spf)" | data = dset1
    con1: Contour | expr = p; levelrounding = off
  pg3: PlotGroup1D "1D Plot Group 3" | data = dset1
    ptgr1: PointGraph on selection geom1_csel1_pnt | data = dset1; expr = y; xdata = expr; xdataexpr = u